// COMSOL Multiphysics 5.0.0.243 model "Permanent Magnet.mph"
// Outline of the model tree

Selections
  sel1: Explicit on no domains

Geometry
  geom1 "Geometry 1" (3D, length unit m)
    imp1: Import | filename = C:\Users\SEO\Desktop\permanent_magnet.mphbin
    blk1: Block | pos = {-0.1, 0, 0}; size = {0.25, 0.1, 0.1}
    co1: Compose | input = blk1, imp1; formula = blk1+blk1*imp1
    fin: Finalize "Form Union"

Materials
  mat1: Common "Iron" on domains 2, 4
    def "Basic"
      relpermeability = 4000
  mat2: Common "Air" on domains 1
    def "Basic"
      relpermeability = 1

Physics
  mfnc: MagnetostaticsNoCurrents "Magnetic Fields, No Currents" on all domains
    dependent variable Vm
    mfc1: MagneticFluxConservation (default)
    mi1: MagneticInsulation (default)
    init1: init "Initial Values 1" (default)
    mfc2: MagneticFluxConservation on domains 3 | ConstitutiveRelationH = Magnetization; M = {750[kA/m], 0, 0}
    zsp1: ZeroMagneticScalarPotential on boundaries 2, 8, 24
    fcal1: ForceCalculation on domains 2 | ForceName = rod

Mesh
  mesh1 "Mesh 1"
    size: MeshSizeDefault | hauto = 4
    ftet1: FreeTet "Free Tetrahedral 1" on remaining entities
      size1: Size on domains 2, 4 | hmax = 0.0025; hauto = 5; custom = on

Studies
  std1 "Study 1"
    stat: Stationary

Solver configurations
  sol1 "Solution 1" (study std1)
    v1: Variables "Dependent Variables 1"
    s1: Stationary "Stationary Solver 1"
      fc1: FullyCoupled | linsolver = i1
      i1: Iterative | linsolver = cg
        mg1: Multigrid | prefun = amg

Datasets
  dset1: Solution | solution = sol1

Derived values
  gev1: EvalGlobal "Global Evaluation 1" | data = dset1; table = tbl1; expr = mfnc.Forcex_rod

Tables
  tbl1: Table
    // Global Evaluation 1 (mfnc.Forcex_rod)
    Electromagnetic force, x component (N) | Electromagnetic force, x component (N)
    1.53356 | 1.53356

Plots
  pg1: PlotGroup3D "3D Plot Group 1" | data = dset1
    slc1: Slice
      expr = mfnc.normB
      quickplane = xy
      quickzmethod = coord
      quickz = 0.005
      genpoints = {{0, 0, 0}, {1, 0, 0}, {0, 1, 0}}
    arwv1: ArrowVolume
      expr = {mfnc.Bx, mfnc.By, mfnc.Bz}
      xnumber = 100
      ynumber = 50
      arrowzmethod = coord
      zcoord = 0.0051